<?xml version="1.0" encoding="UTF-8"?>
<neuroml xmlns="http://www.neuroml.org/schema/neuroml2" xmlns:xsi="http://www.w3.org/2001/XMLSchema-instance" xsi:schemaLocation="http://www.neuroml.org/schema/neuroml2  https://raw.github.com/NeuroML/NeuroML2/development/Schemas/NeuroML2/NeuroML_v2beta3.xsd" id="net">

<include href="../cells/C10_scaled_exp.cell.nml"/>
<include href="../cells/C11A_scaled_exp.cell.nml"/>
<include href="../cells/C15A_scaled_exp.cell.nml"/>
<include href="../cells/C16_scaled_exp.cell.nml"/>
<include href="../cells/C1A_scaled_exp.cell.nml"/>
<include href="../cells/C20A_scaled_exp.cell.nml"/>
<include href="../cells/C21B_scaled_exp.cell.nml"/>
<include href="../cells/C23_scaled_exp.cell.nml"/>

<pulseGenerator id="iclamp0" delay="500 ms" duration="200 ms" amplitude="-1 nA"/>

<network id="net" type="networkWithTemperature" temperature="35 degC">

	<population id="pop0" component="C10" type="populationList" size="1">
		<instance id="0">
			<location x="0" y="0" z="0"/>
		</instance>
	</population>

	<population id="pop1" component="C11A" type="populationList" size="1">
		<instance id="0">
			<location x="200" y="0" z="0"/>
		</instance>
	</population>

	<population id="pop2" component="C15A" type="populationList" size="1">
		<instance id="0">
			<location x="400" y="0" z="0"/>
		</instance>
	</population>

	<population id="pop3" component="C16" type="populationList" size="1">
		<instance id="0">
			<location x="600" y="0" z="0"/>
		</instance>
	</population>

	<population id="pop4" component="C1A" type="populationList" size="1">
		<instance id="0">
			<location x="800" y="0" z="0"/>
		</instance>
	</population>

	<population id="pop5" component="C20A" type="populationList" size="1">
		<instance id="0">
			<location x="1000" y="0" z="0"/>
		</instance>
	</population>

	<population id="pop6" component="C21B" type="populationList" size="1">
		<instance id="0">
			<location x="1200" y="0" z="0"/>
		</instance>
	</population>

	<population id="pop7" component="C23" type="populationList" size="1">
		<instance id="0">
			<location x="1400" y="0" z="0"/>
		</instance>
	</population>

</network>
</neuroml>
